# OpenSim document version 20302
ControlSet Control Set:
  defaults: ControlLinear default: is_model_control=true extrapolate=true default_min=0.02 default_max=1
      filter_on=false use_steps=true kp=100 kv=20
  ControlLinear [values shared by the 138 below unless stated]: is_model_control=true extrapolate=true default_min=0.02
      default_max=1 filter_on=false use_steps=true kp=100 kv=20
  ControlLinear trapscap1.excitation
  ControlLinear trapscap2.excitation
  ControlLinear trapscap3.excitation
  ControlLinear trapscap4.excitation
  ControlLinear trapscap5.excitation
  ControlLinear trapscap6.excitation
  ControlLinear trapscap7.excitation
  ControlLinear trapscap8.excitation
  ControlLinear trapscap9.excitation
  ControlLinear trapscap10.excitation
  ControlLinear trapscap11.excitation
  ControlLinear trapclav1.excitation
  ControlLinear trapclav2.excitation
  ControlLinear levscap1.excitation
  ControlLinear levscap2.excitation
  ControlLinear pectmin1.excitation
  ControlLinear pectmin2.excitation
  ControlLinear pectmin3.excitation
  ControlLinear pectmin4.excitation
  ControlLinear rhomboid1.excitation
  ControlLinear rhomboid2.excitation
  ControlLinear rhomboid3.excitation
  ControlLinear rhomboid4.excitation
  ControlLinear rhomboid5.excitation
  ControlLinear serrant1.excitation
  ControlLinear serrant2.excitation
  ControlLinear serrant3.excitation
  ControlLinear serrant4.excitation
  ControlLinear serrant5.excitation
  ControlLinear serrant6.excitation
  ControlLinear serrant7.excitation
  ControlLinear serrant8.excitation
  ControlLinear serrant9.excitation
  ControlLinear serrant10.excitation
  ControlLinear serrant11.excitation
  ControlLinear serrant12.excitation
  ControlLinear deltscap1.excitation
  ControlLinear deltscap2.excitation
  ControlLinear deltscap3.excitation
  ControlLinear deltscap4.excitation
  ControlLinear deltscap5.excitation
  ControlLinear deltscap6.excitation
  ControlLinear deltscap7.excitation
  ControlLinear deltscap8.excitation
  ControlLinear deltscap9.excitation
  ControlLinear deltscap10.excitation
  ControlLinear deltscap11.excitation
  ControlLinear deltclav1.excitation
  ControlLinear deltclav2.excitation
  ControlLinear deltclav3.excitation
  ControlLinear deltclav4.excitation
  ControlLinear coracobr1.excitation
  ControlLinear coracobr2.excitation
  ControlLinear coracobr3.excitation
  ControlLinear infra1.excitation
  ControlLinear infra2.excitation
  ControlLinear infra3.excitation
  ControlLinear infra4.excitation
  ControlLinear infra5.excitation
  ControlLinear infra6.excitation
  ControlLinear termin1.excitation
  ControlLinear termin2.excitation
  ControlLinear termin3.excitation
  ControlLinear termaj1.excitation
  ControlLinear termaj2.excitation
  ControlLinear termaj3.excitation
  ControlLinear termaj4.excitation
  ControlLinear supra1.excitation
  ControlLinear supra2.excitation
  ControlLinear supra3.excitation
  ControlLinear supra4.excitation
  ControlLinear subscap1.excitation
  ControlLinear subscap2.excitation
  ControlLinear subscap3.excitation
  ControlLinear subscap4.excitation
  ControlLinear subscap5.excitation
  ControlLinear subscap6.excitation
  ControlLinear subscap7.excitation
  ControlLinear subscap8.excitation
  ControlLinear subscap9.excitation
  ControlLinear subscap10.excitation
  ControlLinear subscap11.excitation
  ControlLinear bicl.excitation
  ControlLinear bicb1.excitation
  ControlLinear bicb2.excitation
  ControlLinear triclong1.excitation
  ControlLinear triclong2.excitation
  ControlLinear triclong3.excitation
  ControlLinear triclong4.excitation
  ControlLinear latdorsi1.excitation
  ControlLinear latdorsi2.excitation
  ControlLinear latdorsi3.excitation
  ControlLinear latdorsi4.excitation
  ControlLinear latdorsi5.excitation
  ControlLinear latdorsi6.excitation
  ControlLinear pectmajt1.excitation
  ControlLinear pectmajt2.excitation
  ControlLinear pectmajt3.excitation
  ControlLinear pectmajt4.excitation
  ControlLinear pectmajt5.excitation
  ControlLinear pectmajt6.excitation
  ControlLinear pectmajc1.excitation
  ControlLinear pectmajc2.excitation
  ControlLinear tricmed1.excitation
  ControlLinear tricmed2.excitation
  ControlLinear tricmed3.excitation
  ControlLinear tricmed4.excitation
  ControlLinear tricmed5.excitation
  ControlLinear brachialis1.excitation
  ControlLinear brachialis2.excitation
  ControlLinear brachialis3.excitation
  ControlLinear brachialis4.excitation
  ControlLinear brachialis5.excitation
  ControlLinear brachialis6.excitation
  ControlLinear brachialis7.excitation
  ControlLinear brachiorad1.excitation
  ControlLinear brachiorad2.excitation
  ControlLinear brachiorad3.excitation
  ControlLinear pronteres1.excitation
  ControlLinear pronteres2.excitation
  ControlLinear supinator1.excitation
  ControlLinear supinator2.excitation
  ControlLinear supinator3.excitation
  ControlLinear supinator4.excitation
  ControlLinear supinator5.excitation
  ControlLinear pronquad1.excitation
  ControlLinear pronquad2.excitation
  ControlLinear pronquad3.excitation
  ControlLinear triclat1.excitation
  ControlLinear triclat2.excitation
  ControlLinear triclat3.excitation
  ControlLinear triclat4.excitation
  ControlLinear triclat5.excitation
  ControlLinear anconeus1.excitation
  ControlLinear anconeus2.excitation
  ControlLinear anconeus3.excitation
  ControlLinear anconeus4.excitation
  ControlLinear anconeus5.excitation
