# OpenSim document version 20302
ForceSet arm26:
  CoordinateActuator SC_y_reserve: coordinate=SC_y optimal_force=1
  CoordinateActuator SC_z_reserve: coordinate=SC_z optimal_force=1
  CoordinateActuator SC_x_reserve: coordinate=SC_x optimal_force=1
  CoordinateActuator AC_y_reserve: coordinate=AC_y optimal_force=1
  CoordinateActuator AC_z_reserve: coordinate=AC_z optimal_force=1
  CoordinateActuator AC_x_reserve: coordinate=AC_x optimal_force=1
  CoordinateActuator GH_y_reserve: coordinate=GH_y optimal_force=1
  CoordinateActuator GH_z_reserve: coordinate=GH_z optimal_force=1
  CoordinateActuator GH_yy_reserve: coordinate=GH_yy optimal_force=1
  CoordinateActuator EL_x_reserve: coordinate=EL_x optimal_force=1
  CoordinateActuator PS_y_reserve: coordinate=PS_y optimal_force=1
